Fri Apr 10 16:44:36 HKT 2026
$PROBLEM    Balan et al. in vitro dissolution — Hill in time
;           (formulation-specific T50,gamma ; shared EMAX)
$ABBREVIATED DERIV2=NO
$INPUT      ID TIME DV MDV EVID FORM
$DATA      balan_dissolution_nm.csv
$PRED
; Hill: Fdiss = EMAX * TIME^gamma / (T50^gamma + TIME^gamma)
IF (FORM.EQ.1) THEN
  T50 = THETA(1)
  GAM = THETA(2)
ELSE IF (FORM.EQ.2) THEN
  T50 = THETA(3)
  GAM = THETA(4)
ELSE
  T50 = THETA(5)
  GAM = THETA(6)
ENDIF
EMAX = THETA(7)
IF (TIME.LE.0) THEN
  FDISS = 0
ELSE
  TG = TIME**GAM
  TG50 = T50**GAM
  FDISS = EMAX * TG / (TG50 + TG)
ENDIF
IPRED = FDISS
; ETA(1) with OMEGA fixed ~0: forces population mode for $PRED (NM-TRAN else infers single-subject)
Y = IPRED * EXP(ETA(1)) * (1 + EPS(1)) + EPS(2)

$THETA  (0.01,0.45,5) ; T50 (h) formulation A3
 (0.1,2.5,12) ; Hill exponent A3
 (0.1,2.5,20) ; T50 (h) A7
 (0.1,2,12) ; Hill exponent A7
 (0.5,6,30) ; T50 (h) A15
 (0.1,1.5,12) ; Hill exponent A15
 (85,99.5,102) ; EMAX (% dissolved asymptote)
$OMEGA  1.E-30  FIX  ;     no IIV  ; needed with POPETAS=1
$SIGMA  0.0004  ; proportional error on %
 0.04  ; additive error (%)
$ESTIMATION METHOD=1 INTERACTION MAXEVAL=9999 SIGDIG=3 PRINT=5
$COVARIANCE PRINT=E UNCONDITIONAL
$TABLE      ID TIME MDV EVID DV PRED IPRED RES WRES CWRES FORM
            NOAPPEND FILE=sdtab1.dta FORMAT=s1PE23.15

NM-TRAN MESSAGES
 WARNINGS AND ERRORS (IF ANY) FOR PROBLEM    1
 (WARNING  2) NM-TRAN INFERS THAT THE DATA ARE POPULATION.

1NONLINEAR MIXED EFFECTS MODEL PROGRAM (NONMEM) VERSION 7.6.0 (nm760)
 ORIGINALLY DEVELOPED BY STUART BEAL, LEWIS SHEINER, AND ALISON BOECKMANN
 CURRENT DEVELOPERS ARE ROBERT BAUER, ICON DEVELOPMENT SOLUTIONS,
 AND ALISON BOECKMANN. IMPLEMENTATION, EFFICIENCY, AND STANDARDIZATION
 PERFORMED BY NOUS INFOSYSTEMS.
 PROBLEM NO.:         1
 Balan et al. in vitro dissolution — Hill in time
 TOT. NO. OF OBS RECS:       54
 TOT. NO. OF INDIVIDUALS:        3
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 #TBLN:      1
 #METH: First Order Conditional Estimation with Interaction
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
 #TERM:
0MINIMIZATION SUCCESSFUL
 NO. OF FUNCTION EVALUATIONS USED:      571
 NO. OF SIG. DIGITS IN FINAL EST.:  3.1
0PARAMETER ESTIMATE IS NEAR ITS BOUNDARY

 ETABAR IS THE ARITHMETIC MEAN OF THE ETA-ESTIMATES,
 AND THE P-VALUE IS GIVEN FOR THE NULL HYPOTHESIS THAT THE TRUE MEAN IS 0.

 ETABAR:         0.0000E+00
 SE:             0.0000E+00
 N:                       3

 P VAL.:         1.0000E+00

 ETASHRINKSD(%)  1.0000E+02
 ETASHRINKVR(%)  1.0000E+02
 EBVSHRINKSD(%)  1.0000E+02
 EBVSHRINKVR(%)  1.0000E+02
 RELATIVEINF(%)  0.0000E+00
 EPSSHRINKSD(%)  1.0000E-10  9.4249E-03
 EPSSHRINKVR(%)  1.0000E-10  1.8849E-02


 TOTAL DATA POINTS NORMALLY DISTRIBUTED (N):           54
 N*LOG(2PI) CONSTANT TO OBJECTIVE FUNCTION:    99.245361586104650
 OBJECTIVE FUNCTION VALUE WITHOUT CONSTANT:    69.910670270355837
 OBJECTIVE FUNCTION VALUE WITH CONSTANT:       169.15603185646049
 REPORTED OBJECTIVE FUNCTION DOES NOT CONTAIN CONSTANT

 TOTAL EFFECTIVE ETAS (NIND*NETA):                             3


 #TERE:
 Elapsed estimation  time in seconds:     0.02
0R MATRIX ALGORITHMICALLY SINGULAR
0COVARIANCE MATRIX UNOBTAINABLE
0R MATRIX IS OUTPUT
0S MATRIX ALGORITHMICALLY SINGULAR
0S MATRIX IS OUTPUT
0T MATRIX - EQUAL TO RS*RMAT, WHERE S* IS A PSEUDO INVERSE OF S - IS OUTPUT
 Elapsed covariance  time in seconds:     0.01
 Elapsed postprocess time in seconds:     0.00

 ********************               FIRST ORDER CONDITIONAL ESTIMATION WITH INTERACTION              ********************
 #OBJT:**************                       MINIMUM VALUE OF OBJECTIVE FUNCTION                      ********************
 #OBJV:********************************************            69.911       *********************************************

 ********************               FIRST ORDER CONDITIONAL ESTIMATION WITH INTERACTION              ********************
 ********************                             FINAL PARAMETER ESTIMATE                           ********************

 THETA - VECTOR OF FIXED EFFECTS PARAMETERS   *********
         TH 1      TH 2      TH 3      TH 4      TH 5      TH 6      TH 7
         5.51E-01  1.52E+00  2.28E+00  1.78E+00  4.59E+00  1.80E+00  1.01E+02

 OMEGA - COV MATRIX FOR RANDOM EFFECTS - ETAS  ********
         ETA1
 ETA1
+        1.00E-30

 SIGMA - COV MATRIX FOR RANDOM EFFECTS - EPSILONS  ****
         EPS1      EPS2
 EPS1
+        4.00E-08
 EPS2
+        0.00E+00  1.34E+00

 OMEGA - CORR MATRIX FOR RANDOM EFFECTS - ETAS  *******
         ETA1
 ETA1
+        1.00E-15

 SIGMA - CORR MATRIX FOR RANDOM EFFECTS - EPSILONS  ***
         EPS1      EPS2
 EPS1
+        2.00E-04
 EPS2
+        0.00E+00  1.16E+00
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 Elapsed finaloutput time in seconds:     0.00
 #CPUT: Total CPU Time in Seconds,        0.040
