Fri Aug 21 17:42:49 HKT 2026
$PROBLEM  esay-nonmem skill self-test — 1-cpt IV, 1 subject
$INPUT  ID TIME AMT DV EVID CMT MDV
$DATA   data.csv IGNORE=@

$SUBROUTINES ADVAN1 TRANS2

$PK
  TVCL = THETA(1)
  TVV  = THETA(2)
  CL   = TVCL * EXP(ETA(1))
  V    = TVV
  S1   = V

$ERROR
  IPRED = F
  Y     = IPRED * (1 + EPS(1)) + EPS(2)

$THETA
  (0, 2, 50)   ; CL
  (0, 20, 200) ; V

$OMEGA
  1.E-30 FIX ; negligible IIV for quick self-test

$SIGMA
  0.05 0.0001

$ESTIMATION METHOD=1 INTERACTION MAXEVAL=9999 SIGDIG=3 PRINT=5 POSTHOC
$COVARIANCE PRINT=E

$TABLE ID TIME DV PRED IPRED CWRES MDV EVID NOAPPEND NOPRINT FILE=sdtab1 ONEHEADER
$TABLE ID ETA1 NOAPPEND NOPRINT FILE=patab1 ONEHEADER

NM-TRAN MESSAGES
 WARNINGS AND ERRORS (IF ANY) FOR PROBLEM    1
 (WARNING  2) NM-TRAN INFERS THAT THE DATA ARE POPULATION.
Note: Analytical 2nd Derivatives are constructed in FSUBS but are never used.
      You may insert $ABBR DERIV2=NO after the first $PROB to save FSUBS construction and compilation time

1NONLINEAR MIXED EFFECTS MODEL PROGRAM (NONMEM) VERSION 7.6.0 (nm760)
 ORIGINALLY DEVELOPED BY STUART BEAL, LEWIS SHEINER, AND ALISON BOECKMANN
 CURRENT DEVELOPERS ARE ROBERT BAUER, ICON DEVELOPMENT SOLUTIONS,
 AND ALISON BOECKMANN. IMPLEMENTATION, EFFICIENCY, AND STANDARDIZATION
 PERFORMED BY NOUS INFOSYSTEMS.
 PROBLEM NO.:         1
 esay-nonmem skill self-test — 1-cpt IV, 1 subject
 TOT. NO. OF OBS RECS:        4
 TOT. NO. OF INDIVIDUALS:        1
 ONE COMPARTMENT MODEL (ADVAN1)
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 #TBLN:      1
 #METH: First Order Conditional Estimation with Interaction
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
 #TERM:
0MINIMIZATION SUCCESSFUL
 NO. OF FUNCTION EVALUATIONS USED:      213
 NO. OF SIG. DIGITS IN FINAL EST.:  3.4
0PARAMETER ESTIMATE IS NEAR ITS BOUNDARY
 THIS MUST BE ADDRESSED BEFORE THE COVARIANCE STEP CAN BE IMPLEMENTED

 ETABAR IS THE ARITHMETIC MEAN OF THE ETA-ESTIMATES,
 AND THE P-VALUE IS GIVEN FOR THE NULL HYPOTHESIS THAT THE TRUE MEAN IS 0.

 ETABAR:         0.0000E+00
 SE:             0.0000E+00
 N:                       1

 P VAL.:         1.0000E+00

 ETASHRINKSD(%)  1.0000E+02
 ETASHRINKVR(%)  1.0000E+02
 EBVSHRINKSD(%)  1.0000E+02
 EBVSHRINKVR(%)  1.0000E+02
 RELATIVEINF(%)  0.0000E+00
 EPSSHRINKSD(%)  1.0000E-10  1.0000E-10
 EPSSHRINKVR(%)  1.0000E-10  1.0000E-10


 TOTAL DATA POINTS NORMALLY DISTRIBUTED (N):            4
 N*LOG(2PI) CONSTANT TO OBJECTIVE FUNCTION:    7.3515082656373814
 OBJECTIVE FUNCTION VALUE WITHOUT CONSTANT:   -4.1893115800571534
 OBJECTIVE FUNCTION VALUE WITH CONSTANT:       3.1621966855802279
 REPORTED OBJECTIVE FUNCTION DOES NOT CONTAIN CONSTANT

 TOTAL EFFECTIVE ETAS (NIND*NETA):                             1


 #TERE:
 Elapsed estimation  time in seconds:     0.00
 Elapsed postprocess time in seconds:     0.00

 ********************               FIRST ORDER CONDITIONAL ESTIMATION WITH INTERACTION              ********************
 #OBJT:**************                       MINIMUM VALUE OF OBJECTIVE FUNCTION                      ********************
 #OBJV:********************************************            -4.189       *********************************************

 ********************               FIRST ORDER CONDITIONAL ESTIMATION WITH INTERACTION              ********************
 ********************                             FINAL PARAMETER ESTIMATE                           ********************

 THETA - VECTOR OF FIXED EFFECTS PARAMETERS   *********
         TH 1      TH 2
         7.91E+00  4.90E+01

 OMEGA - COV MATRIX FOR RANDOM EFFECTS - ETAS  ********
         ETA1
 ETA1
+        1.00E-30

 SIGMA - COV MATRIX FOR RANDOM EFFECTS - EPSILONS  ****
         EPS1      EPS2
 EPS1
+        5.68E-02
 EPS2
+        0.00E+00  1.00E-08

 OMEGA - CORR MATRIX FOR RANDOM EFFECTS - ETAS  *******
         ETA1
 ETA1
+        1.00E-15

 SIGMA - CORR MATRIX FOR RANDOM EFFECTS - EPSILONS  ***
         EPS1      EPS2
 EPS1
+        2.38E-01
 EPS2
+        0.00E+00  1.00E-04
 Elapsed finaloutput time in seconds:     0.00
 #CPUT: Total CPU Time in Seconds,        0.019
