Sat Sep  5 12:08:04 HKT 2026
;; Theophylline population PK — one-compartment oral model (walkthrough demo)
;; Data: classic theophylline dataset, 12 subjects, single oral dose 4.02 mg/kg
;; AMT is in mg/kg, so CL and V are in per-kg units (L/h/kg, L/kg).
;; ADVAN2 TRANS2: KA (absorption), K = CL/V (elimination), S2 = V
;; Covariate: allometric weight on CL (0.75) and V (1.0), reference 70 kg
$PROBLEM    Theophylline 1-cpt oral popPK (easy-nonmem walkthrough)
$INPUT      ID TIME AMT DV WT SEX EVID CMT MDV
$DATA      theo_nm.csv IGNORE=@
$SUBROUTINE ADVAN2 TRANS2
$PK
  TVKA = THETA(1)
  TVCL = THETA(2)
  TVV  = THETA(3)
  KA   = TVKA * EXP(ETA(1))
  CL   = TVCL * (WT/70)**0.75 * EXP(ETA(2))
  V    = TVV  * (WT/70)       * EXP(ETA(3))
  S2   = V
  K    = CL/V

$ERROR
  IPRED = F
  Y     = IPRED * (1 + EPS(1)) + EPS(2)

$THETA  (0,1.0,20) ; KA   (1/h)
 (0,0.04,5) ; CL   (L/h/kg,per-kg dose basis)
 (0,0.5,5) ; V    (L/kg,per-kg dose basis)
$OMEGA  0.09  ;  IIV on KA
 0.09  ;  IIV on CL
 0.09  ;   IIV on V
$SIGMA  0.05  ; proportional
 0.01  ; additive (mg/L)
$ESTIMATION METHOD=1 INTERACTION MAXEVAL=9999 SIGDIG=3 PRINT=5 POSTHOC
$COVARIANCE PRINT=E
$TABLE      ID TIME DV WT SEX KA CL V PRED IPRED CWRES NOAPPEND
            NOPRINT ONEHEADER FILE=sdtab1

NM-TRAN MESSAGES
 WARNINGS AND ERRORS (IF ANY) FOR PROBLEM    1
 (WARNING  2) NM-TRAN INFERS THAT THE DATA ARE POPULATION.
Note: Analytical 2nd Derivatives are constructed in FSUBS but are never used.
      You may insert $ABBR DERIV2=NO after the first $PROB to save FSUBS construction and compilation time

1NONLINEAR MIXED EFFECTS MODEL PROGRAM (NONMEM) VERSION 7.6.0 (nm760)
 ORIGINALLY DEVELOPED BY STUART BEAL, LEWIS SHEINER, AND ALISON BOECKMANN
 CURRENT DEVELOPERS ARE ROBERT BAUER, ICON DEVELOPMENT SOLUTIONS,
 AND ALISON BOECKMANN. IMPLEMENTATION, EFFICIENCY, AND STANDARDIZATION
 PERFORMED BY NOUS INFOSYSTEMS.
 PROBLEM NO.:         1
 Theophylline 1-cpt oral popPK (easy-nonmem walkthrough)
 TOT. NO. OF OBS RECS:      120
 TOT. NO. OF INDIVIDUALS:       12
 ONE COMPARTMENT MODEL WITH FIRST-ORDER ABSORPTION (ADVAN2)
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 #TBLN:      1
 #METH: First Order Conditional Estimation with Interaction
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
 #TERM:
0MINIMIZATION SUCCESSFUL
 NO. OF FUNCTION EVALUATIONS USED:      223
 NO. OF SIG. DIGITS IN FINAL EST.:  3.2

 ETABAR IS THE ARITHMETIC MEAN OF THE ETA-ESTIMATES,
 AND THE P-VALUE IS GIVEN FOR THE NULL HYPOTHESIS THAT THE TRUE MEAN IS 0.

 ETABAR:        -1.2743E-02  2.7174E-03 -7.7233E-03
 SE:             1.7646E-01  8.2956E-02  6.0604E-02
 N:                      12          12          12

 P VAL.:         9.4243E-01  9.7387E-01  8.9859E-01

 ETASHRINKSD(%)  6.8641E+00  6.2297E+00  6.8112E+00
 ETASHRINKVR(%)  1.3257E+01  1.2071E+01  1.3158E+01
 EBVSHRINKSD(%)  4.9969E+00  5.9593E+00  6.9954E+00
 EBVSHRINKVR(%)  9.7441E+00  1.1563E+01  1.3501E+01
 RELATIVEINF(%)  8.9406E+01  8.7861E+01  8.5441E+01
 EPSSHRINKSD(%)  1.4122E+01  1.4122E+01
 EPSSHRINKVR(%)  2.6251E+01  2.6251E+01


 TOTAL DATA POINTS NORMALLY DISTRIBUTED (N):          120
 N*LOG(2PI) CONSTANT TO OBJECTIVE FUNCTION:    220.54524796912145
 OBJECTIVE FUNCTION VALUE WITHOUT CONSTANT:    134.83452889526779
 OBJECTIVE FUNCTION VALUE WITH CONSTANT:       355.37977686438921
 REPORTED OBJECTIVE FUNCTION DOES NOT CONTAIN CONSTANT

 TOTAL EFFECTIVE ETAS (NIND*NETA):                            36


 #TERE:
 Elapsed estimation  time in seconds:     0.11
 Elapsed covariance  time in seconds:     0.09
 Elapsed postprocess time in seconds:     0.00

 ********************               FIRST ORDER CONDITIONAL ESTIMATION WITH INTERACTION              ********************
 #OBJT:**************                       MINIMUM VALUE OF OBJECTIVE FUNCTION                      ********************
 #OBJV:********************************************           134.835       *********************************************

 ********************               FIRST ORDER CONDITIONAL ESTIMATION WITH INTERACTION              ********************
 ********************                             FINAL PARAMETER ESTIMATE                           ********************

 THETA - VECTOR OF FIXED EFFECTS PARAMETERS   *********
         TH 1      TH 2      TH 3
         1.56E+00  4.06E-02  4.69E-01

 OMEGA - COV MATRIX FOR RANDOM EFFECTS - ETAS  ********
         ETA1      ETA2      ETA3
 ETA1
+        4.31E-01
 ETA2
+        0.00E+00  9.39E-02
 ETA3
+        0.00E+00  0.00E+00  5.08E-02

 SIGMA - COV MATRIX FOR RANDOM EFFECTS - EPSILONS  ****
         EPS1      EPS2
 EPS1
+        5.42E-03
 EPS2
+        0.00E+00  3.56E-01

 OMEGA - CORR MATRIX FOR RANDOM EFFECTS - ETAS  *******
         ETA1      ETA2      ETA3
 ETA1
+        6.56E-01
 ETA2
+        0.00E+00  3.06E-01
 ETA3
+        0.00E+00  0.00E+00  2.25E-01

 SIGMA - CORR MATRIX FOR RANDOM EFFECTS - EPSILONS  ***
         EPS1      EPS2
 EPS1
+        7.36E-02
 EPS2
+        0.00E+00  5.96E-01

 ********************               FIRST ORDER CONDITIONAL ESTIMATION WITH INTERACTION              ********************
 ********************                            STANDARD ERROR OF ESTIMATE                          ********************

 THETA - VECTOR OF FIXED EFFECTS PARAMETERS   *********
         TH 1      TH 2      TH 3
         3.05E-01  3.71E-03  3.02E-02

 OMEGA - COV MATRIX FOR RANDOM EFFECTS - ETAS  ********
         ETA1      ETA2      ETA3
 ETA1
+        2.30E-01
 ETA2
+       .........  5.37E-02
 ETA3
+       ......... .........  1.62E-02

 SIGMA - COV MATRIX FOR RANDOM EFFECTS - EPSILONS  ****
         EPS1      EPS2
 EPS1
+        4.89E-03
 EPS2
+       .........  1.52E-01

 OMEGA - CORR MATRIX FOR RANDOM EFFECTS - ETAS  *******
         ETA1      ETA2      ETA3
 ETA1
+        1.76E-01
 ETA2
+       .........  8.76E-02
 ETA3
+       ......... .........  3.59E-02

 SIGMA - CORR MATRIX FOR RANDOM EFFECTS - EPSILONS  ***
         EPS1      EPS2
 EPS1
+        3.32E-02
 EPS2
+       .........  1.28E-01

 ********************               FIRST ORDER CONDITIONAL ESTIMATION WITH INTERACTION              ********************
 ********************                          COVARIANCE MATRIX OF ESTIMATE                         ********************

            TH 1      TH 2      TH 3      OM11      OM12      OM13      OM22      OM23      OM33      SG11      SG12      SG22
 TH 1
+        9.28E-02
 TH 2
+       -2.98E-04  1.37E-05
 TH 3
+       -3.73E-03  9.62E-05  9.11E-04
 OM11
+        4.19E-02 -1.45E-04 -2.61E-03  5.31E-02
 OM12
+       ......... ......... ......... ......... .........
 OM13
+       ......... ......... ......... ......... ......... .........
 OM22
+        3.44E-03 -1.40E-04 -7.25E-04  3.12E-04 ......... .........  2.89E-03
 OM23
+       ......... ......... ......... ......... ......... ......... ......... .........
 OM33
+        3.14E-03 -3.03E-05 -2.30E-04  2.38E-03 ......... .........  5.39E-04 .........  2.62E-04
 SG11
+        1.55E-04  4.61E-06  5.11E-05  1.01E-04 ......... ......... -4.23E-06 .........  3.16E-05  2.39E-05
 SG12
+       ......... ......... ......... ......... ......... ......... ......... ......... ......... ......... .........
 SG22
+       -9.46E-03 -7.47E-05 -1.04E-03 -1.68E-02 ......... ......... -9.25E-04 ......... -8.77E-04 -4.34E-04 .........  2.32E-02

 ********************               FIRST ORDER CONDITIONAL ESTIMATION WITH INTERACTION              ********************
 ********************                          CORRELATION MATRIX OF ESTIMATE                        ********************

            TH 1      TH 2      TH 3      OM11      OM12      OM13      OM22      OM23      OM33      SG11      SG12      SG22
 TH 1
+        3.05E-01
 TH 2
+       -2.64E-01  3.71E-03
 TH 3
+       -4.06E-01  8.60E-01  3.02E-02
 OM11
+        5.97E-01 -1.70E-01 -3.75E-01  2.30E-01
 OM12
+       ......... ......... ......... ......... .........
 OM13
+       ......... ......... ......... ......... ......... .........
 OM22
+        2.10E-01 -7.05E-01 -4.47E-01  2.52E-02 ......... .........  5.37E-02
 OM23
+       ......... ......... ......... ......... ......... ......... ......... .........
 OM33
+        6.37E-01 -5.05E-01 -4.70E-01  6.39E-01 ......... .........  6.20E-01 .........  1.62E-02
 SG11
+        1.04E-01  2.55E-01  3.47E-01  8.97E-02 ......... ......... -1.61E-02 .........  4.00E-01  4.89E-03
 SG12
+       ......... ......... ......... ......... ......... ......... ......... ......... ......... ......... .........
 SG22
+       -2.04E-01 -1.32E-01 -2.26E-01 -4.80E-01 ......... ......... -1.13E-01 ......... -3.56E-01 -5.83E-01 .........  1.52E-01
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
 ********************               FIRST ORDER CONDITIONAL ESTIMATION WITH INTERACTION              ********************
 ********************                      EIGENVALUES OF COR MATRIX OF ESTIMATE                     ********************

             1         2         3         4         5         6         7         8
         1.11E-03  6.00E-02  2.59E-01  4.03E-01  5.56E-01  1.12E+00  2.21E+00  3.39E+00
 Elapsed finaloutput time in seconds:     0.00
 #CPUT: Total CPU Time in Seconds,        0.219
